<?xml version="1.0"?>
<?xml-stylesheet type="text/xsl" href="http://jsbsim.sourceforge.net/JSBSim.xsl"?>
<fdm_config name="ERJ-170" version="2.0" release="BETA"
   xmlns:xsi="http://www.w3.org/2001/XMLSchema-instance"
   xsi:noNamespaceSchemaLocation="http://jsbsim.sourceforge.net/JSBSim.xsd">

    <fileheader>
        <author>Narendran Muraleedharan</author>
        <author>Tobias Dammers</author>
        <filecreationdate>2011-08-08</filecreationdate>
        <version>$Revision: 2.0$</version>
        <description> Flight Dynamics Model for the Embraer 175</description>
    </fileheader>

    <!-- UNIT CONVERSIONS :
1 meter = 3.2 feet
1 foot = 0.3048 m
1 meter = 39.4 inches
1 sq. m = 10.24 sq. ft.
1 foot  = 12 inches -->

    <metrics>
        <!-- Calculated Wing Area (wikipedia) -->
        <wingarea  unit="M2">72.72</wingarea>
        <!-- Wingspan 26 m (wikipedia/FCOM) -->
        <wingspan  unit="FT" >85.3</wingspan>
        <!-- Wing Incidence = 3 (pure guesswork) -->
        <wing_incidence unit="DEG"> 3.0 </wing_incidence>
        <!-- Chord = 4.72 m from  -->
        <chord     unit="FT" >   14.72 </chord>
        <!-- Horizontal Tail Area = 18.9735 sq m (calculated on paper) -->
        <htailarea unit="FT2">  194.28864 </htailarea>
        <!-- Horizontal Tail Arm (extrapolated from E170) -->
        <htailarm  unit="FT" >   45.19 </htailarm>
        <!-- Vertical Tail Area = 17.2975 sq m (calculated on paper) -->
        <vtailarea unit="FT2">  177.1264 </vtailarea>
        <!-- Vertical Tail Arm (extrapolated from E170) -->
        <vtailarm  unit="FT" > 43.80</vtailarm>
        <location name="AERORP" unit="IN">
            <x> 0 </x>
            <y> 0 </y>
            <z> 0 </z>
        </location>
        <!-- Eyepoint extrapolated from E170 -->
        <location name="EYEPOINT" unit="IN">
            <x> -460.95 </x>
            <y> 0 </y>
            <z> 1.14 </z>
        </location>
        <!-- VRP extrapolated from E170 -->
        <location name="VRP" unit="IN">
            <x>42.55</x>
            <y> 0 </y>
            <z> 0 </z>
        </location>
    </metrics>

    <mass_balance>
        <ixx unit="SLUG*FT2">    662000 </ixx>
        <iyy unit="SLUG*FT2">    500000 </iyy>
        <izz unit="SLUG*FT2">    662000 </izz>
        <ixy unit="SLUG*FT2">         0 </ixy>
        <ixz unit="SLUG*FT2">         0 </ixz>
        <iyz unit="SLUG*FT2">         0 </iyz>
        <!-- Operational Empty Weight = 44,600 lbs from wikipedia -->
        <emptywt unit="KG" > 21890 </emptywt>

        <!-- extrapolated from E170 -->
        <location name="CG" unit="IN">
            <!-- <x>-116.93</x> -->
            <x>-42.0</x>
            <y>0.0</y>
            <z>0.0</z>
        </location>

        <pointmass name="Crew">
            <weight unit="LBS">300</weight>
            <location name="POINTMASS" unit="IN">
                <x>-460.95</x>
                <y>0</y>
                <z>1.14</z>
            </location>
        </pointmass>
        <pointmass name="Passengers">
            <!-- wikipedia -->
            <weight unit="LBS">22289</weight>
            <location name="POINTMASS" unit="IN">
                <x>0</x>
                <y>0</y>
                <z>1.14</z>
            </location>
        </pointmass>

    </mass_balance>

    <ground_reactions>

        <!-- Nose Gear Contact Point -->
        <contact type="BOGEY" name="NOSE_GEAR">
            <location unit="IN">
                <!-- extrapolated from E170 -->
                <x> -398.38</x>
                <y> 0.00 </y>
                <z> -89.832 </z>
            </location>
            <static_friction>  1.50 </static_friction>
            <dynamic_friction> 0.50 </dynamic_friction>
            <rolling_friction> 0.01 </rolling_friction>
            <spring_coeff unit="LBS/FT"> 180000 </spring_coeff>
            <damping_coeff unit="LBS/FT/SEC"> 33957 </damping_coeff>
            <max_steer unit="DEG"> 70 </max_steer>
            <brake_group>NONE</brake_group>
            <retractable>1</retractable>
            <table name="CORNERING_COEFF" type="internal">
                <tableData> <!-- jsbsim-pacejka.py 3.0 0.03 2.85 1.4 1.03 1.4 -->
                    -90.0 -0.64429852792097750
                    -85.0 -0.65803784878515970
                    -80.0 -0.67367546323532410
                    -75.0 -0.69148835376736980
                    -70.0 -0.71179130570975040
                    -65.0 -0.73493212105552120
                    -60.0 -0.76127441823995780
                    -55.0 -0.79115479580170660
                    -50.0 -0.82478835297656280
                    -45.0 -0.86207184328003720
                    -40.0 -0.90218731471298370
                    -35.0 -0.94282786495867110
                    -30.0 -0.97874912755212280
                    -25.0 -0.99927325792190310
                    -20.0 -0.98471983766820350
                    -15.0 -0.90363984864415470
                    -10.0 -0.71770750752441240
                    -5.0 -0.40543502538657494
                    0.0  0.00000000000000000
                    5.0  0.40543502538657494
                    10.0  0.71770750752441240
                    15.0  0.90363984864415470
                    20.0  0.98471983766820350
                    25.0  0.99927325792190310
                    30.0  0.97874912755212280
                    35.0  0.94282786495867110
                    40.0  0.90218731471298370
                    45.0  0.86207184328003720
                    50.0  0.82478835297656280
                    55.0  0.79115479580170660
                    60.0  0.76127441823995780
                    65.0  0.73493212105552120
                    70.0  0.71179130570975040
                    75.0  0.69148835376736980
                    80.0  0.67367546323532410
                    85.0  0.65803784878515970
                    90.0  0.64429852792097750
                </tableData>
            </table>
        </contact>

        <!-- Left Main Gear Contact Point -->
        <contact type="BOGEY" name="LEFT_MAIN">
            <location unit="IN">
                <x>   41.34</x>
                <y> -101.258 </y>
                <z>  -93.772 </z>
            </location>
            <static_friction>  0.40 </static_friction>
            <dynamic_friction> 0.50 </dynamic_friction>
            <rolling_friction> 0.01 </rolling_friction>
            <spring_coeff unit="LBS/FT"> 100000 </spring_coeff>
            <damping_coeff unit="LBS/FT/SEC"> 20000 </damping_coeff>
            <max_steer unit="DEG">0</max_steer>
            <table name="CORNERING_COEFF" type="internal">
                <tableData> <!-- jsbsim-pacejka.py 3.0 0.06 2.8 0.4 1.03 0.4 -->
                    -90.0 -0.5760395836174765
                    -85.0 -0.5776440181093163
                    -80.0 -0.5803918992801416
                    -75.0 -0.5845010317001210
                    -70.0 -0.5902476568617109
                    -65.0 -0.5979865464058901
                    -60.0 -0.6081793463286825
                    -55.0 -0.6214348494943271
                    -50.0 -0.6385661913510731
                    -45.0 -0.6606706311692150
                    -40.0 -0.6892340269266316
                    -35.0 -0.7262408296125531
                    -30.0 -0.7741813043425955
                    -25.0 -0.8355026710967954
                    -20.0 -0.9097416834082445
                    -15.0 -0.9818532434458515
                    -10.0 -0.9824937511496707
                    -5.0 -0.7127565569007204
                    0.0  0.0000000000000000
                    5.0  0.7127565569007204
                    10.0  0.9824937511496707
                    15.0  0.9818532434458515
                    20.0  0.9097416834082445
                    25.0  0.8355026710967954
                    30.0  0.7741813043425955
                    35.0  0.7262408296125531
                    40.0  0.6892340269266316
                    45.0  0.6606706311692150
                    50.0  0.6385661913510731
                    55.0  0.6214348494943271
                    60.0  0.6081793463286825
                    65.0  0.5979865464058901
                    70.0  0.5902476568617109
                    75.0  0.5845010317001210
                    80.0  0.5803918992801416
                    85.0  0.5776440181093163
                    90.0  0.5760395836174765
                </tableData>
            </table>
            <brake_group>LEFT</brake_group>
            <retractable>1</retractable>
        </contact>

        <!-- Right Main Gear Contact Point -->
        <contact type="BOGEY" name="RIGHT_MAIN">
            <location unit="IN">
                <x>  41.34</x>
                <y> 101.258 </y>
                <z> -93.772 </z>
            </location>
            <static_friction>  0.40 </static_friction>
            <dynamic_friction> 0.50 </dynamic_friction>
            <rolling_friction> 0.01 </rolling_friction>
            <spring_coeff unit="LBS/FT"> 100000 </spring_coeff>
            <damping_coeff unit="LBS/FT/SEC"> 20000 </damping_coeff>
            <max_steer unit="DEG">0</max_steer>
            <table name="CORNERING_COEFF" type="internal">
                <tableData> <!-- jsbsim-pacejka.py 3.0 0.06 2.8 0.4 1.03 0.4 -->
                    -90.0 -0.5760395836174765
                    -85.0 -0.5776440181093163
                    -80.0 -0.5803918992801416
                    -75.0 -0.5845010317001210
                    -70.0 -0.5902476568617109
                    -65.0 -0.5979865464058901
                    -60.0 -0.6081793463286825
                    -55.0 -0.6214348494943271
                    -50.0 -0.6385661913510731
                    -45.0 -0.6606706311692150
                    -40.0 -0.6892340269266316
                    -35.0 -0.7262408296125531
                    -30.0 -0.7741813043425955
                    -25.0 -0.8355026710967954
                    -20.0 -0.9097416834082445
                    -15.0 -0.9818532434458515
                    -10.0 -0.9824937511496707
                    -5.0 -0.7127565569007204
                    0.0  0.0000000000000000
                    5.0  0.7127565569007204
                    10.0  0.9824937511496707
                    15.0  0.9818532434458515
                    20.0  0.9097416834082445
                    25.0  0.8355026710967954
                    30.0  0.7741813043425955
                    35.0  0.7262408296125531
                    40.0  0.6892340269266316
                    45.0  0.6606706311692150
                    50.0  0.6385661913510731
                    55.0  0.6214348494943271
                    60.0  0.6081793463286825
                    65.0  0.5979865464058901
                    70.0  0.5902476568617109
                    75.0  0.5845010317001210
                    80.0  0.5803918992801416
                    85.0  0.5776440181093163
                    90.0  0.5760395836174765
                </tableData>
            </table>
            <brake_group>RIGHT</brake_group>
            <retractable>1</retractable>
        </contact>

        <!-- Left Wing Tip Contact Point -->
        <contact type="STRUCTURE" name="LEFT_WING_TIP">
            <location unit="IN">
                <x>  170.08</x>
                <y> -490.924 </y>
                <z> 10.64 </z>
            </location>
            <static_friction>  0.9 </static_friction>
            <dynamic_friction> 0.8 </dynamic_friction>
            <spring_coeff unit="LBS/FT">      200000.00 </spring_coeff>
            <damping_coeff unit="LBS/FT/SEC"> 10000.00 </damping_coeff>
            <brake_group> NONE </brake_group>
            <retractable>0</retractable>
        </contact>

        <!-- Right Wing Tip Contact Point -->
        <contact type="STRUCTURE" name="RIGHT_WING_TIP">
            <location unit="IN">
                <x> 170.08</x>
                <y> 490.924 </y>
                <z> 10.64 </z>
            </location>
            <static_friction>  0.9 </static_friction>
            <dynamic_friction> 0.8 </dynamic_friction>
            <spring_coeff unit="LBS/FT">      200000.00 </spring_coeff>
            <damping_coeff unit="LBS/FT/SEC"> 10000.00 </damping_coeff>
            <brake_group> NONE </brake_group>
            <retractable>0</retractable>
        </contact>

        <!-- Tail (in case of a tail strike) Contact Point -->
        <contact type="STRUCTURE" name="TAIL_STRIKE">
            <location unit="IN">
                <!-- extrapolated from E170 -->
                <x>671.59</x>
                <y> 0 </y>
                <z> 45.62914 </z>
            </location>
            <static_friction>  0.95 </static_friction>
            <dynamic_friction> 0.9 </dynamic_friction>
            <spring_coeff unit="LBS/FT">      200000.00 </spring_coeff>
            <damping_coeff unit="LBS/FT/SEC"> 10000.00 </damping_coeff>
            <brake_group> NONE </brake_group>
            <retractable>0</retractable>
        </contact>

        <!-- Nose (used for Ditching) Contact Point -->
        <contact type="STRUCTURE" name="TAIL_STRIKE">
            <location unit="IN">
                <!-- extrapolated from E170 -->
                <x>-575.65</x>
                <y> 0 </y>
                <z> -28.762 </z>
            </location>
            <static_friction>  0.95 </static_friction>
            <dynamic_friction> 0.9 </dynamic_friction>
            <spring_coeff unit="LBS/FT">      200000.00 </spring_coeff>
            <damping_coeff unit="LBS/FT/SEC"> 10000.00 </damping_coeff>
            <brake_group> NONE </brake_group>
            <retractable>0</retractable>
        </contact>

    </ground_reactions>

    <!-- 2 x General Electric CF34-8E Engines -->
    <propulsion>

        <engine file="GE_CF34-8E">
            <location unit="IN">
                <x> -78.74 </x>
                <y> -157.6 </y>
                <z> -43.34 </z>
            </location>
            <orient unit="DEG">
                <pitch> 0.00 </pitch>
                <roll>   0.00 </roll>
                <yaw>   0.00 </yaw>
            </orient>
            <feed>1</feed>
            <feed>0</feed>
            <thruster file="direct">
                <location unit="IN">
                    <x> -78.74 </x>
                    <y> -157.6 </y>
                    <z> -43.34 </z>
                </location>
                <orient unit="DEG">
                    <pitch>  1.10 </pitch>
                    <roll>   0.00 </roll>
                    <yaw>   -1.00 </yaw>
                </orient>
            </thruster>
        </engine>

        <engine file="GE_CF34-8E">
            <location unit="IN">
                <x> -78.74 </x>
                <y> 157.6 </y>
                <z> -43.34 </z>
            </location>
            <orient unit="DEG">
                <pitch> 0.00 </pitch>
                <roll>   0.00 </roll>
                <yaw>   0.00 </yaw>
            </orient>
            <feed>1</feed>
            <feed>2</feed>
            <thruster file="direct">
                <location unit="IN">
                    <x> -78.74 </x>
                    <y> 157.6 </y>
                    <z> -43.34 </z>
                </location>
                <orient unit="DEG">
                    <pitch> 1.10 </pitch>
                    <roll>  0.00 </roll>
                    <yaw>   1.00 </yaw>
                </orient>
            </thruster>
        </engine>

        <!-- Wing Fuel Tank LEFT -->
        <tank type="FUEL" number="0">
            <location unit="IN">
                <x> 33.096 </x>
                <y> -133.96 </y>
                <z> -5.91 </z>
            </location>
            <capacity unit="KG"> 2650 </capacity>
            <contents unit="KG"> 2000 </contents>
        </tank>

        <!-- Central Fuel Tank -->
        <tank type="FUEL" number="1">
            <location unit="IN">
                <x> -30.072 </x>
                <y> 0.00 </y>
                <z> -36.642 </z>
            </location>
            <capacity unit="KG"> 3100 </capacity>
            <contents unit="KG"> 0 </contents>
        </tank>

        <!-- Wing Fuel Tank RIGHT -->
        <tank type="FUEL" number="2">
            <location unit="IN">
                <x> 33.096 </x>
                <y> 133.96 </y>
                <z> -5.91 </z>
            </location>
            <capacity unit="KG"> 2650 </capacity>
            <contents unit="KG"> 2000 </contents>
        </tank>

        <!-- Trim Fuel Tank -->
        <tank type="FUEL" number="3">
            <location unit="IN">
                <x> 494.864 </x>
                <y> 0 </y>
                <z> 54.372 </z>
            </location>
            <capacity unit="KG"> 935 </capacity>
            <contents unit="KG"> 100 </contents>
        </tank>

    </propulsion>

    <flight_control name="FCS: ERJ-175">
        <channel name="Pitch">
            <summer name="Pitch Trim Sum">
                <input>fcs/elevator-cmd-norm</input>
                <input>fcs/pitch-trim-cmd-norm</input>
                <clipto>
                    <min> -1.5 </min>
                    <max>  1.5 </max>
                </clipto>
            </summer>

            <aerosurface_scale name="Elevator Control">
                <input>fcs/pitch-trim-sum</input>
                <range>
                    <min> -0.25 </min>
                    <max>  0.25 </max>
                </range>
                <output>fcs/elevator-pos-rad</output>
            </aerosurface_scale>

            <aerosurface_scale name="elevator normalization">
                <input>fcs/elevator-pos-rad</input>
                <domain>
                    <min> -0.25 </min>
                    <max>  0.25 </max>
                </domain>
                <range>
                    <min> -1 </min>
                    <max>  1 </max>
                </range>
                <output>fcs/elevator-pos-norm</output>
            </aerosurface_scale>
        </channel>

        <channel name="Roll">
            <summer name="Roll Trim Sum">
                <input>fcs/aileron-cmd-norm</input>
                <input>fcs/roll-trim-cmd-norm</input>
                <clipto>
                    <min> -1 </min>
                    <max>  1 </max>
                </clipto>
            </summer>

            <aerosurface_scale name="Left Aileron Control">
                <input>fcs/roll-trim-sum</input>
                <range>
                    <min> -0.25 </min>
                    <max>  0.25 </max>
                </range>
                <output>fcs/left-aileron-pos-rad</output>
            </aerosurface_scale>

            <aerosurface_scale name="Right Aileron Control">
                <input>fcs/roll-trim-sum</input>
                <range>
                    <min> -0.25 </min>
                    <max>  0.25 </max>
                </range>
                <output>fcs/right-aileron-pos-rad</output>
            </aerosurface_scale>

            <aerosurface_scale name="left aileron normalization">
                <input>fcs/left-aileron-pos-rad</input>
                <domain>
                    <min> -0.25 </min>
                    <max>  0.25 </max>
                </domain>
                <range>
                    <min> -1 </min>
                    <max>  1 </max>
                </range>
                <output>fcs/left-aileron-pos-norm</output>
            </aerosurface_scale>

            <aerosurface_scale name="right aileron normalization">
                <input>fcs/right-aileron-pos-rad</input>
                <domain>
                    <min> -0.25 </min>
                    <max>  0.25 </max>
                </domain>
                <range>
                    <min> -1 </min>
                    <max>  1 </max>
                </range>
                <output>fcs/right-aileron-pos-norm</output>
            </aerosurface_scale>

        </channel>

        <channel name="Yaw">
            <summer name="Rudder Command Sum">
                <input>fcs/rudder-cmd-norm</input>
                <input>fcs/yaw-trim-cmd-norm</input>
                <clipto>
                    <min> -0.55 </min>
                    <max>  0.55 </max>
                </clipto>
            </summer>

            <scheduled_gain name="Yaw Damper Rate">
                <input>velocities/r-aero-rad_sec</input>
                <table>
                    <independentVar lookup="row">velocities/ve-kts</independentVar>
                    <tableData>
                        30     0.00
                        60     2.00
                    </tableData>
                </table>
                <gain>fcs/yaw-damper-enable</gain>
            </scheduled_gain>

            <scheduled_gain name="Yaw Damper Beta">
                <input>aero/beta-rad</input>
                <table>
                    <independentVar>aero/qbar-psf</independentVar>
                    <tableData>
                        3.0000   0.0000
                        11.0000   0.0000
                    </tableData>
                </table>
            </scheduled_gain>

            <scheduled_gain name="Yaw Damper">
                <input>velocities/r-aero-rad_sec</input>
                <table>
                    <independentVar>velocities/mach</independentVar>
                    <tableData>
                        0.00        0.0
                        0.10        0.0
                        0.11        1.0
                    </tableData>
                </table>
            </scheduled_gain>

            <scheduled_gain name="Yaw Damper Final">
                <input>fcs/yaw-damper</input>
                <table>
                    <independentVar>velocities/mach</independentVar>
                    <tableData>
                        0.00        0.0
                        0.10        0.0
                        0.11        1.0
                    </tableData>
                </table>
            </scheduled_gain>

            <summer name="Rudder Sum">
                <input>fcs/rudder-command-sum</input>
                <input>fcs/yaw-damper-final</input>
                <clipto>
                    <min> -1 </min>
                    <max>  1 </max>
                </clipto>
            </summer>

            <aerosurface_scale name="Rudder Control">
                <input>fcs/rudder-sum</input>
                <range>
                    <min> -0.530 </min>
                    <max>  0.530 </max>
                </range>
                <output>fcs/rudder-pos-rad</output>
            </aerosurface_scale>

            <aerosurface_scale name="rudder normalization">
                <input>fcs/rudder-pos-rad</input>
                <domain>
                    <min> -0.530 </min>
                    <max>  0.530 </max>
                </domain>
                <range>
                    <min> -1 </min>
                    <max>  1 </max>
                </range>
                <output>fcs/rudder-pos-norm</output>
            </aerosurface_scale>

        </channel>

        <channel name="Slats">

            <!--Set slats according to http://www.smartcockpit.com/docs/Embraer_190-Flight_Controls.pdf page 4-->
            <fcs_function name="Slats Cmd">
                <function>
                    <table>
                        <independentVar>/controls/flight/flaps</independentVar>
                        <tableData>
                            0.000   0
                            0.125  15
                            0.250  15
                            0.375  15
                            0.500  25
                            0.625  25
                            0.750  25
                        </tableData>
                    </table>
                </function>
                <output>fcs/slat-cmd-int-deg</output>
            </fcs_function>

            <kinematic name="Slats Control">
                <input>fcs/slat-cmd-int-deg</input>
                <noscale/>
                <traverse>
                    <setting>
                        <position>0.0</position>
                        <time>0.0000</time>
                    </setting>
                    <setting>
                        <position>15</position>
                        <time>2.0000</time>
                    </setting>
                    <setting>
                        <position>25</position>
                        <time>1.5000</time>
                    </setting>
                </traverse>
                <output>fcs/slat-pos-deg</output>
            </kinematic>

            <aerosurface_scale name="slat normalization">
                <input>fcs/slat-pos-deg</input>
                <domain>
                    <min>  0 </min>
                    <max> 25 </max>
                </domain>
                <range>
                    <min> 0 </min>
                    <max> 1 </max>
                </range>
                <output>fcs/slat-pos-norm</output>
            </aerosurface_scale>

        </channel>


        <channel name="Flaps">


            <!-- Set flaps according to http://www.smartcockpit.com/docs/Embraer_190-Flight_Controls.pdf page 4-->
            <fcs_function name="Flaps Cmd">
                <function>
                    <table>
                        <independentVar>/controls/flight/flaps</independentVar>
                        <tableData>
                            0.000   0
                            0.125   5
                            0.250  10
                            0.375  20
                            0.500  20
                            0.625  20
                            0.750  35
                        </tableData>
                    </table>
                </function>
                <output>fcs/flap-cmd-int-deg</output>
            </fcs_function>

            <kinematic name="Flaps Control">
                <input>fcs/flap-cmd-int-deg</input>
                <noscale/>
                <traverse>
                    <setting>
                        <position>0</position>
                        <time>0.0000</time>
                    </setting>
                    <setting>
                        <position>5</position>
                        <time>2.0000</time>
                    </setting>
                    <setting>
                        <position>10</position>
                        <time>2.0000</time>
                    </setting>
                    <setting>
                        <position>20</position>
                        <time>2.0000</time>
                    </setting>
                    <setting>
                        <position>35</position>
                        <time>3.0000</time>
                    </setting>
                </traverse>
                <output>fcs/flap-pos-deg</output>
            </kinematic>

            <aerosurface_scale name="flap normalization">
                <input>fcs/flap-pos-deg</input>
                <domain>
                    <min>  0 </min>
                    <max> 35 </max>
                </domain>
                <range>
                    <min> 0 </min>
                    <max> 1 </max>
                </range>
                <output>fcs/flap-pos-norm</output>
            </aerosurface_scale>

        </channel>

        <channel name="Landing Gear">
            <kinematic name="Gear Control">
                <input>gear/gear-cmd-norm</input>
                <traverse>
                    <setting>
                        <position> 0 </position>
                        <time>     0 </time>
                    </setting>
                    <setting>
                        <position> 1 </position>
                        <time>     15 </time>
                    </setting>
                </traverse>
                <output>gear/gear-pos-norm</output>
            </kinematic>

        </channel>

        <channel name="Speedbrake">
            <kinematic name="Speedbrake Control">
                <input>fcs/speedbrake-cmd-norm</input>
                <traverse>
                    <setting>
                        <position> 0 </position>
                        <time>     0 </time>
                    </setting>
                    <setting>
                        <position> 1 </position>
                        <time>     1 </time>
                    </setting>
                </traverse>
                <output>fcs/speedbrake-pos-norm</output>
            </kinematic>

        </channel>

    </flight_control>

    <flight_control file="FDM/flight-control.xml" />
    <aerodynamics file="FDM/aerodynamics.xml" />

    <external_reactions>
        <force name="tractor" frame="BODY">
            <location unit="IN">
                <!-- extrapolated from E170 -->
                <x> -398.38</x>
                <y> 0.00 </y>
                <z> -89.832 </z>
            </location>
            <direction>
                <x>1.0</x>
                <y>0.0</y>
                <z>0.0</z>
            </direction>
        </force>
    </external_reactions>
</fdm_config>
